x := -0.5, -0.4 .. 0.5
f(x) :=
    k ← 1
    y ← x^(k + 2)/(k!*(k + 2))
    y0 ← 100
    while |y - y0| > 10^6
        y0 ← y
        k ← k + 1
        y ← x^(k + 2)/(k!*(k + 2)) + y0
    return y
x = [-0.5; -0.4; -0.3; -0.2; -0.1; 0; 0.1; 0.2; 0.3; 0.4; 0.5]
f(x) = [-0.0416667; -0.0213333; -0.009; -0.00266667; -0.000333333; 0; 0.000333333; 0.00266667; 0.009; 0.0213333; 0.0416667]
