n := 10 .. 15
f(n, x) := atan(x) - sum((x^(2*k - 1) + 1/7)/sqrt(e^(x/k) + nthroot(x^(k - 1), k)), k = 1 .. n)
x := 0.6, 0.85 .. 1.1
n = [10; 11; 12; 13; 14; 15]
x = [0.6; 0.85; 1.1]
f(n, x) = [-1.09543; -1.20551; -1.31582; -1.42633; -1.53701; -1.64783; -2.14429; -2.27041; -2.39022; -2.50549; -2.61748; -2.72713; -19.7416; -24.8321; -30.9832; -38.4177; -47.4055; -58.2732]
