x := -3, -2.9 .. 3
x = [
    -3; -2.9; -2.8; -2.7; -2.6; -2.5; -2.4; -2.3; -2.2; -2.1
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]
cos(x) = [
    -0.989992; -0.970958; -0.942222; -0.904072; -0.856889; -0.801144; -0.737394; -0.666276; -0.588501; -0.504846
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]
exp(x) = [
    0.0497871; 0.0550232; 0.0608101; 0.0672055; 0.0742736; 0.082085; 0.090718; 0.100259; 0.110803; 0.122456
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]
