N0 := 10000
a := 0
b := 1
Y := runif(N0, a, b)
X := 10*sqrt(-2*ln(1 - Y))
X := sort(X)
N(t) :=
    i ← 0
    while t > X[i]
        i ← i + 1
    N0 - i
h := 0.5
Tmax := round(max(X)/h, 0)
i := 0 .. Tmax
T[i] := i*h
i := 0 .. Tmax - 1
P1[i] := N(T[i])/N0
P1[Tmax] := 0
P(t, δ) := e^(-(t^2/(2*δ^2)))
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Q1[i] := (N0 - N(T[i]))/N0
Q(t, δ) := 1 - e^(-(t^2/(2*δ^2)))
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i := 0 .. Tmax - 2
f(t, δ) := t/δ^2*e^(-(t^2/(2*δ^2)))
f1[i] := (N(T[i]) - N(T[i] + h))/(N0*h)
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i := 0 .. Tmax - 2
λ(t, δ) := f(t, δ)/P(t, δ)
λ1[i] := (N(T[i]) - N(T[i] + h))/(N(T[i])*h)
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