f(x, δ) := x/δ^2*e^(-(x^2/(2*δ^2)))
F(x, δ) := 1 - e^(-(x^2/(2*δ^2)))
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M := integral(x*f(x, 10), x = 0 .. 60)
D := integral(x^2*f(x, 10), x = 0 .. 60) - integral(x*f(x, 10), x = 0 .. 60)^2
σ := sqrt(D)
n := 10000
i := 1 .. n
a := 0
b := 1
Y1 := runif(n, a, b)
X1 := 10*sqrt(-2*ln(1 - Y1))
X2 := sort(X1)
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bin := 40
lower := floor(min(X1))
upper := ceil(max(X1))
h := (upper - lower)/bin
j := 1 .. bin + 1
int[j] := lower + h*j
t := hist(int, X1)/n
int := int + h/2
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m1 := sum(X1[i - 1], i = 1 .. n)/n
d1 := sum(X1[i - 1]^2, i = 1 .. n)/n - (sum(X1[i - 1], i = 1 .. n)/n)^2
M = 12.5331
D = 42.9203
m1 = 12.664
d1 = 44.7361
