f(x, δ) := x/δ^2*e^(-(x^2/(2*δ^2)))
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F(x, δ) := 1 - e^(-(x^2/(2*δ^2)))
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a1(δ) := integral(x*f(x, δ), x = 0 .. 100)
a2(δ) := integral(x^2*f(x, δ), x = 0 .. 100)
a3(δ) := integral(x^3*f(x, δ), x = 0 .. 100)
M1(δ) := a1(δ)
M1(10) = 12.5331
M2(δ) := 1.253*δ
M2(10) = 12.53
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d/dx(f(x, δ)) solve, x → [δ; -δ]
root(d/dx(f(x, 10)), x, 0, 50) = 10
F(x, δ) == 1/2 solve, x → [sqrt(2)*δ*sqrt(ln(2)); -sqrt(2)*δ*sqrt(ln(2))]
root(F(x, 10) - 1/2, x, 0, 50) = 11.7741
D1(δ) := a2(δ) - a1(δ)^2
D1(10) = 42.9204
D2(δ) := 0.429*δ^2
D2(10) = 42.9
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σ(δ) := sqrt(D1(δ))
σ(10) = 6.55136
μ3(δ) := 2*a1(δ)^3 - 3*a1(δ)*a2(δ) + a3(δ)
S(δ) := μ3(δ)/σ(δ)^3
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